<Lems
      xmlns="http://www.neuroml.org/lems/0.7.4"
      xmlns:xsi="http://www.w3.org/2001/XMLSchema-instance"
      xsi:schemaLocation="http://www.neuroml.org/lems/0.7.4 ../../LEMS/Schemas/LEMS/LEMS_v0.7.4.xsd"
      description="A number of ComponentTypes for rate based/population models.
                    Base type of any cell/population which has a (dimensionless) rate _R.
                    Generic nonlinear 2-D (phase plane) oscillator.">

    <ComponentType name="Generic2doscillatorT"
                   description="Rate based 2D oscillator for TVB"
                   value="">

        <!-- If empty then none -->
        <Constant name="tau" domain="lo=1.0, hi=5.0, step=0.01" default="1.0"
                  description="A time-scale hierarchy can be introduced for the state variables :math:`V` and :math:`W`. Default parameter is 1, which means no time-scale hierarchy."/>
        <Constant name="I" domain="lo=-5.0, hi=5.0, step=0.01" default="0.0" description="Baseline shift of the cubic nullcline"/>
        <Constant name="a" domain="lo=-5.0, hi=5.0, step=0.01" default="-2.0" description="Vertical shift of the configurable nullcline"/>
        <Constant name="b" domain="lo=-20.0, hi=15.0, step=0.01" default="-10.0" description="Linear slope of the configurable nullcline"/>
        <Constant name="c" domain="lo=-10.0, hi=10.0, step=0.01" default="0" description="Parabolic term of the configurable nullcline"/>
        <Constant name="d" domain="lo=0.0001, hi=1.0, step=0.0001" default="0.02" description="Temporal scale factor. Warning: do not use it unless you know what you are doing and know about time tides."/>
        <Constant name="e" domain="lo=-5.0, hi=5.0, step=0.0001" default="3.0" description="Coefficient of the quadratic term of the cubic nullcline."/>
        <Constant name="f" domain="lo=-5.0, hi=5.0, step=0.0001" default="1.0" description="Coefficient of the cubic term of the cubic nullcline."/>
        <Constant name="g" domain="lo=-5.0, hi=5.0, step=0.5" default="0.0" description="Coefficient of the linear term of the cubic nullcline."/>
        <Constant name="alpha" domain="lo=-5.0, hi=5.0, step=0.0001" default="1.0" description="Constant parameter to scale the rate of feedback from the slow variable to the fast variable."/>
        <Constant name="beta" domain="lo=-5.0, hi=5.0, step=0.0001" default="1.0" description="Constant parameter to scale the rate of feedback from the slow variable to itself"/>
        <Constant name="gamma" domain="lo=-1.0, hi=1.0, step=0.1" default="1.0" description="Constant parameter to reproduce FHN dynamics where excitatory input currents are negative. It scales both I and the long range coupling term.."/>

        <Dynamics>
            <!-- "State variable ranges [lo, hi]" values are entered with keyword "default" -->
            <!-- For each state variable a set of boundaries can be added to encompass the boundaries of the dynamic range -->
            <!-- Leave empty "" for no boundaries. Set None for one-sided boundaries, i.e. "1.0, None" -->
            <StateVariable name="V" default="-2.0, 4.0" boundaries=""/>
            <StateVariable name="W" default="-6.0, 6.0" />

            <!-- For conditionals use &lt(=); or &gt;(=) for less- or greater then (equal to)  -->
            <!-- Conditional used for if statement, syntax: if {condition} -> {cases[0]} else {cases[1]}. Cases are separated by (,) -->
            <TimeDerivative name="dV" expression="d * tau * (alpha * W - f * V**3 + e * V**2 + g * V + gamma * I + gamma * coupling[0] + local_coupling)"/>
            <TimeDerivative name="dW" expression="d * (a + b * V + c * V**2 - beta * W) / tau"/>
        </Dynamics>

        <!-- Exposures are used for observables, for the name enter variable to be observed (usually states)
        and for dimension enter the reduction functionality. Will be represented as variables_of_interest.
        Choices and default list with a (,) separator-->
        <Exposure name="V" choices="V, W, V + W, V - W" default="V"/>

    </ComponentType>
</Lems>
