<Lems
      xmlns="http://www.neuroml.org/lems/0.7.4"
      xmlns:xsi="http://www.w3.org/2001/XMLSchema-instance"
      xsi:schemaLocation="http://www.neuroml.org/lems/0.7.4 ../../LEMS/Schemas/LEMS/LEMS_v0.7.4.xsd"
      description="A number of ComponentTypes for rate based/population models.
                    Base type of any cell/population which has a (dimensionless) rate _R.
                    Generic nonlinear 2-D (phase plane) oscillator.">

    <ComponentType name="ReducedWongWangT"
                   description="Rate based 2D oscillator for TVB"
                   value="">

        <Constant name="a" domain="lo=0.0, hi=0.270, step=0.01" default="0.270" description="[n/C]. Input gain parameter, chosen to fit numerical solutions."/>
        <Constant name="b" domain="lo=0.0, hi=1.0, step=0.01" default="0.108" description="[kHz]. Input shift parameter chosen to fit numerical solutions."/>
        <Constant name="d" domain="lo=0.0, hi=200.0, step=0.01" default="154." description="[ms]. Parameter chosen to fit numerical solutions."/>
        <Constant name="gamma" domain="lo=0.0, hi=1.0, step=0.01" default="0.641" description="Kinetic parameter"/>
        <Constant name="tau_s" domain="lo=50., hi=150., step=1." default="100." description="Kinetic parameter. NMDA decay time constant."/>
        <Constant name="w" domain="lo=0.0, hi=1.0, step=0.01" default="0.6" description="Excitatory recurrence"/>
        <Constant name="J_N" domain="lo=0.2609, hi=0.5, step=0.001" default="0.2609" description="Excitatory recurrence"/>
        <Constant name="I_o" domain="lo=0.0, hi=1.0, step=0.01" default="0.33" description="[nA] Effective external input"/>
<!--        <Constant name="sigma_noise" symbol="NArray" dimension="lo=0.0, hi=0.005, step=0.0001" value="0.000000001" description="[nA] Noise amplitude. Take this value into account for stochastic-->
<!--        integration schemes."/>-->

        <Dynamics>
            <!-- "State variable ranges [lo, hi]" values are entered with keyword "default" -->
            <!-- For each state variable a set of boundaries can be added to encompass the boundaries of the dynamic range -->
            <!-- Leave empty "" for no boundaries. Set None for one-sided boundaries, i.e. "1.0, None" -->
            <StateVariable name="S" default="0.0, 1.0" boundaries="0.0, 1.0"/>

            <!-- Derived variables can be used to simplify the time derivatives, enter the local coupling formulas or any formula -->
            <!-- syntax: [name]=[expression] -->
            <!-- Define for ex. global and local coupling: c_0 = coupling[0, ] and lc_0 = local_coupling -->
            <DerivedVariable name="x" expression="w * J_N * S + I_o + J_N * coupling[0] + J_N * local_coupling"/>
            <DerivedVariable name="H" expression="(a * x - b) / (1 - exp(-d * (a * x - b)))"/>

            <TimeDerivative name="dS" expression="- (S / tau_s) + (1 - S) * H * gamma"/>

        </Dynamics>

        <!-- Exposures are used for observables, for the name enter variable to be observed (usually states)
        and for dimension enter the reduction functionality. Will be represented as variables_of_interest.
        Choices and default list with a (,) seperator-->
        <Exposure name="S" choices="S" default="S" description="default state variables to be monitored"/>

    </ComponentType>

</Lems>
