<Lems description="A number of ComponentTypes for rate based/population models.">

    <Constant name="omega" dimension="lo=0.01, hi=200.0, step=0.1" value="1.0" description="sets the base line frequency for the Kuramoto oscillator in [rad/ms]"/>

    <ComponentType name="derivatives">

        <!-- Exposures are used for observables, for the name enter variable to be observed (usually states)
        and for dimension enter the reduction functionality. Will be represented as variables_of_interest.
        Choices and default list with a (,) separator-->
        <Exposure name="theta" dimension="theta" description="theta"/>

        <Dynamics>
            <!-- "State variable ranges [lo, hi]" values are entered with keyword "default" -->
            <!-- For each state variable a set of boundaries can be added to encompass the boundaries of the dynamic range -->
            <!-- Leave empty "" for no boundaries. Set None for one-sided boundaries, i.e. "1.0, None" -->
            <StateVariable name="theta" dimension="0.0, pi * 2.0"/>

            <!-- Derived variables can be used to simplify the time derivatives, enter the local coupling formulas or any formula -->
            <!-- syntax: [name]=[expression] -->
            <!-- Define for ex. global and local coupling: c_0 = coupling[0, ] and lc_0 = local_coupling -->
            <DerivedVariable name="I" value="coupling[0] + sin(local_coupling * theta)"/>

            <TimeDerivative variable="dV" value="omega + I"/>
        </Dynamics>

    </ComponentType>

</Lems>
